# Modulul 1.
# I. 1. CALCULUL PARAMETRILOR MAŞINII DE CURENT CONTINUU
# Date initiale:
N_1 := 1  # (număr de ordine din semigrupă)
N_2 := 1  # (număr de ordine al semigrupei)
U_aN := 110  # V  # (tensiunea nominală)
# -Coeficienţii de calcul:
K_1 := 1.1
K_2 := 0.2
K_3 := 80
K_4 := 2.84
K_5 := 0.70
K_6 := 0.086
K_7 := 0.018
K_8 := 1.1
K_9 := 1.3
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X_a% := 19 + K_5*N_1 = 19.7  # (%)
19 + K_5*N_1 explicit, K_5, N_1 → 19 + 0.70 = 19.7  # (%)
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P_N := K_1*N_1 = 1.1  # (kW)
K_1*N_1 explicit, K_1, N_1 → 1.1 = 1.1  # (kW)
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η_N% := 84 + K_2*N_1
84 + K_2*N_1 explicit, K_2, N_1 → 84 + 0.2 = 84.2  # (%)
η_N% = 84.2  # (%)
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n_N := 20*(K_3 + N_2) = 1620  # (rpm)
20*(K_3 + N_2) explicit, K_3, N_2 → 20*(80 + 1) = 1620  # (rpm)
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n'_max := K_4 + N_1/100 = 2.85
K_4 + N_1/100 explicit, K_4, N_1 → 2.84 + 1/100 = 2.85
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P_eN := K_6*P_N = 0.0946  # (kW)
K_6*P_N explicit, K_6, P_N → 0.086*1.1 = 0.0946  # (kW)
P_eN := 0.1  # (kW)
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τ_e := 0.35 + K_7*N_1 = 0.368  # (ms)
(0.35 + K_7*N_1) explicit, K_7, N_1 → 0.35 + 0.018 = 0.368  # (ms)
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N_1 + N_2 = 2  # -număr par:
U_eN := 220  # V  # conexiune "serie"
N_1 + N_2 explicit, N_1, N_2 → 1 + 1 = 2
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ψ_rem% := 3 + K_8*N_1 = 4.1  # (%)
3 + K_8*N_1 explicit, K_8, N_1 → 3 + 1.1 = 4.1  # (%)
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ψ_sat% := 131 - K_9*N_1 = 129.7  # (%)
131 - K_9*N_1 explicit, K_9, N_1 → 131 - 1.3 = 129.7  # (%)
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I_aN := P_N*10^3/(U_aN*η_N%/100) = 11.8765  # (A)
P_N*10^3/(U_aN*η_N%/100) explicit, P_N, U_aN, η_N%, K_2, N_1 → 1.1*10^3/(110*(84 + 0.2)/100) = 11.8765  # (A)
I_aN := 11.9  # (A)
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η_N := P_N*10^3/(U_aN*I_aN)*100 = 84.0336  # (%)
P_N*10^3/(U_aN*I_aN)*100 explicit, P_N, U_aN, I_aN → 1.1*10^3/(110*11.9)*100 = 84.0336  # (%)
# I. 2. CALCULUL DATELOR PRINCIPALE ALE INDUSULUI:
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R_N := U_aN/I_aN = 9.2437  # (Ω)
U_aN/I_aN explicit, U_aN, I_aN → 110/11.9 = 9.2437  # (Ω)
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Ω_N := π*n_N/30 = 169.646  # (rad/sec)
π*n_N/30 explicit, π, n_N → π*1620/30 = 169.646  # (rad/sec)
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# Valoarea raportată:
R'_a := 1 - sqrt(η_N/100) = 0.0833015
η_N = 84.0336
1 - sqrt(η_N/100) explicit, η_N → 1 - sqrt(84.0336134454/100) = 0.0833015
R'_a.recalculat := 1 - sqrt(P_N*10^3/(U_aN*I_aN)) = 0.0833015
1 - sqrt(P_N*10^3/(U_aN*I_aN)) explicit, P_N, U_aN, I_aN → 1 - sqrt(1.1*10^3/(110*11.9)) = 0.0833015
# Valoarea procentuală:
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R_a% := 100*R'_a = 8.33015  # (%)
R'_a = 0.0833015
R_N = 9.2437
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# Valoarea absolută:
R_a := R'_a*R_N = 0.770014  # (Ω)
R_a := R_N*R_a%/100 = 0.770014  # (Ω)
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C_N := (U_aN - R_a*I_aN)/Ω_N = 0.594396  # (V*s)
R_a := 0.77
I_aN := 11.9
U_aN := 110
Ω_N := 169.64
(U_aN - R_a*I_aN)/Ω_N explicit, U_aN, R_a, I_aN, Ω_N → (110 - 0.77*11.9)/169.64 = 0.594418  # (V*s)
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M_N := C_N*I_aN = 7.07331  # (N*m)
C_N*I_aN explicit, C_Na, I_aN → C_N*11.9 = 7.07331
C_N = 0.594396
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M_arbN := P_N*10^3/Ω_N = 6.48432  # (N*m)
P_N*10^3/Ω_N explicit, P_N, Ω_N → 1.1*10^3/169.64 = 6.48432  # (N*m)
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M_0 := M_N - M_arbN = 0.0360017*16.36  # (N*m)
M_N = 7.07331
M_N := 7.073  # (N*m)
M_arbN := 6.487  # (N*m)
M_N - M_arbN explicit, M_N, M_arbN → 7.073 - 6.487 = 0.586  # (N*m)
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# Valoarea absolută:
M_0 := 0.586  # (N*m)
C_N := 0.594
I_0N := M_0/C_N = 0.986532  # (A)
M_0/C_N explicit, M_0, C_N → 0.586/0.594 = 0.986532  # (A)
# Valoarea raportată:
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I'_0N := I_0N/I_aN = 0.0829018  # (u*r)
I_0N := 0.987  # (A)
I_0N/I_aN explicit, I_0N, I_aN → 0.987/11.9 = 0.0829412  # (u*r)
# Valoarea procentuală:
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I_0N% := 100*I'_0N = 8.29018  # (%)
I'_0N := 0.08
(100*I'_0N) explicit, I'_0N → 100*0.08 = 8  # (%)
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Ω_max := n'_max*Ω_N = 483.474  # (rad/s)
(n'_max*Ω_N) explicit, n'_max, Ω_N → 2.85*169.64 = 483.474  # (rad/s)
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n_max := n'_max*n_N = 4617  # (rot/min)
(n'_max*n_N) explicit, n'_max, n_N → 2.85*1620 = 4617  # (rot/min)
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L_a := X_a%*R_N/(100*Ω_N) = 0.0107345  # (H)
X_a% := 19.7  # (Ω)
R_N := 9.24
Ω_N := 169.64
X_a%*R_N/(100*Ω_N) explicit, X_a%, R_N, Ω_N → 19.7*9.24/(100*169.64) = 0.0107303  # (H)
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τ_a := L_a/R_a = 0.013941  # (s)
L_a := 0.011*10^-4  # (H)
R_a := 0.77  # (Ω)
L_a/R_a explicit, L_a, R_a → 0.011*10^-4/0.77 = 1.42857e-6  # (s)
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η_N := P_N*10^3/(U_aN*I_aN) = 0.840336
P_N*10^3/(U_aN*I_aN) explicit, P_N, U_aN, I_aN → 1.1*10^3/(110*11.9) = 0.840336
η_N := (1 - R'_a)*(1 - I'_0N) = 0.843363
# I. 3. CALCULUL DATELOR PRINCIPALE ALE EXCITAŢIEI:
# Date initiale:
# 1.26. Puterea nominală a excitaţiei:
P_eN*10^3 = 100  # (W)
# 1.27. Tensiunea nominală a excitaţiei:
U_eN = 220  # (V)
# 1.28. Constanta de timp:
τ_e = 0.368  # (ms)
# Date calculate:
# 1.29.Curentul nominal:
I_eN := P_eN*10^3/U_eN = 0.454545  # (A)
P_eN*10^3/U_eN explicit, P_eN, U_eN → 0.1*10^3/220 = 0.454545  # (A)
# 1.30. Rezistenţa totală (echivalentă):
R_e := U_eN^2/(P_eN*10^3) = 484  # (Ω)
U_eN^2/(P_eN*10^3) explicit, U_eN, P_eN → 220^2/(0.1*10^3) = 484  # (Ω)
# 1.31. Inductivitatea totală:
τ_e = 0.368
R_e = 484
L_e := τ_e*R_e = 178.112  # (mH)
(τ_e*R_e) explicit, τ_e, R_e → 0.368*484 = 178.112
# Datele unei înfăşurări de excitaţie:
# Se vor calcula datele corespunzatoare unei infasurari excitatie doar pentru cazul conexiunii
# (paralel sau serie) care a fost aleasala punctul 1.9
#
# Alegem conexiunea serie
# Puterea:
p_e1.2 := P_eN*10^3/2 = 50  # (W)
P_eN*10^3/2 explicit, P_eN → 0.1*10^3/2 = 50  # (W)
# Tensiunea:
U_e1.2 := 110  # (V)
# Curentul:
I_e1.2 := I_eN = 0.454545  # (A)
# Inductivitatea:
L_e := 178.112
L_e1.2 := L_e/2 = 89.056  # (mH)
# Rezistenţa:
R_e := 484  # Ω
R_e1.2 := R_e/2 = 242  # (Ω)
# I.4 RIDICAREA CARACTERISTICILOR MECANICE ALE MAŞINII DE
# CURENT CONTINUU:
# 1. Consideraţii teoretice: - Ecuaţiile maşinii de curent continuu:
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# -Expresia tensiunii electromotoare:
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# -Ecuaţia de tensiune a circuitului indusului:
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# -Expresia cuplului electromagnetic:
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# -Exresia analitică a caracteristicii mecanice:
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# unde Rtot = Ra + Rs, Rs fiind valoarea rezistenţei
# în serie cu indusul, sau exprimat cu curentul indusului:
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# 2. Ridicarea caracteristicii naturale:
# Declararea datelor inițiale:
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C_N := 0.594
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R_a := 0.77  # (Ω)
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U_aN := 110  # (V)
# M = 0 | M = M0 | M = MN | M = 2.5 MN
# M (N m)
0
M_0 = 0.586
M_N = 7.073
2.5*M_N = 17.6825
# Ω (rad / s) | 148.45 | 147.733 | 138.247 | 122.944
R_tot := R_a = 0.77  # (Ω)
148.45
Ω_1 := U_aN/C_N - 0 = 185.185  # (rad/s)
U_aN/C_N explicit, U_aN, C_N → 110/0.594 = 185.185  # (rad/s)
147.733
138.247
(rad/s)
C_N = 0.594
R_tot := 0.024  # (Ω)
Ω_2 := U_aN/C_N - R_tot*M_0/C_N^2 = 185.145
122.944
M_0 = 0.586  # (N*m)
U_aN/C_N - R_tot*M_0/C_N^2 explicit, U_aN, C_N, R_tot, M_0, C_N → 110/0.594 - 0.024*0.586/0.594^2 = 185.145  # (rad/s)
Ω_3 := U_aN/C_N - R_tot*M_N/C_N^2 = 184.704  # (rad/s)
M_N = 7.073  # (N*m)
U_aN/C_N - R_tot*M_N/C_N^2 explicit, U_aN, C_N, R_tot, M_N, C_N → 110/0.594 - 0.024*7.073/0.594^2 = 184.704  # (rad/s)
Ω_4 := U_aN/C_N - R_tot*2.5*M_N/C_N^2 = 183.982  # (rad/s)
U_aN/C_N - R_tot*2.5*M_N/C_N^2 explicit, U_aN, C_N, R_tot, M_N, C_N → 110/0.594 - 0.024*2.5*7.073/0.594^2 = 183.982  # (rad/s)
# 3. Ridicarea caracteristicii artificiale:
# a. Obţinute prin modificarea tensiunii de alimentarea a indusului Ua = <var.>
# Declararea datelor iniţiale:
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# Caracteristica
# naturală
# Ua = Un
# Caracteristica la
# Ua = 0.75 * Un
# Caracteristica la
# U = 0.5 * Un
# Caracteristica la
# U = 0.25 * Un
# M [N m] | Ω [rad / s] | Ω [rad / s] | Ω [rad / s] | Ω [rad / s]
M := 0
148.45
111.336
74.224
37.112
M_0 = 0.586
147.733
110.621
73.509
36.397
M_N = 7.073
138.247
101.135
64.023
26.911
2.5*M_N = 17.6825
122.944
85.832
48.72
11.608
# -pentru Ua = 0.75 * Un:
Ω_5 := 0.75*U_aN/C_N - 0 = 138.889  # (rad/s)
0.75*U_aN/C_N explicit, U_aN, C_N → 0.75*110/0.594 = 138.889  # (rad/s)
Ω_6 := 0.75*U_aN/C_N - R_tot*M_0/C_N^2 = 138.849  # (rad/s)
C_N = 0.594
M_0 = 0.586  # (N*m)
0.75*U_aN/C_N - R_tot*M_0/C_N^2 explicit, U_aN, C_N, R_tot, M_0, C_N → 0.75*110/0.594 - 0.024*0.586/0.594^2 = 138.849  # (rad/s)
Ω_7 := 0.75*U_aN/C_N - R_tot*M_N/C_N^2 = 138.408  # (rad/s)
M_N = 7.073  # (N*m)
0.75*U_aN/C_N - R_tot*M_N/C_N^2 explicit, U_aN, C_N, R_tot, M_N, C_N → 0.75*110/0.594 - 0.024*7.073/0.594^2 = 138.408  # (rad/s)
Ω_8 := 0.75*U_aN/C_N - R_tot*2.5*M_N/C_N^2 = 137.686  # (rad/s)
0.75*U_aN/C_N - R_tot*2.5*M_N/C_N^2 explicit, U_aN, C_N, R_tot, M_N, C_N → 0.75*110/0.594 - 0.024*2.5*7.073/0.594^2 = 137.686  # (rad/s)
# -pentru Ua = 0.5 * Un:
Ω_9 := 0.5*U_aN/C_N - 0 = 92.5926  # (rad/s)
0.5*U_aN/C_N explicit, U_aN, C_N → 0.5*110/0.594 = 92.5926  # (rad/s)
Ω_10 := 0.5*U_aN/C_N - R_tot*M_0/C_N^2 = 92.5527  # (rad/s)
C_N = 0.594
M_0 = 0.586  # (N*m)
0.5*U_aN/C_N - R_tot*M_0/C_N^2 explicit, U_aN, C_N, R_tot, M_0, C_N → 0.5*110/0.594 - 0.024*0.586/0.594^2 = 92.5527  # (rad/s)
Ω_11 := 0.5*U_aN/C_N - R_tot*M_N/C_N^2 = 92.1115  # (rad/s)
M_N = 7.073  # (N*m)
0.5*U_aN/C_N - R_tot*M_N/C_N^2 explicit, U_aN, C_N, R_tot, M_N, C_N → 0.5*110/0.594 - 0.024*7.073/0.594^2 = 92.1115
Ω_12 := 0.5*U_aN/C_N - R_tot*2.5*M_N/C_N^2 = 91.3898  # (rad/s)
0.5*U_aN/C_N - R_tot*2.5*M_N/C_N^2 explicit, U_aN, C_N, R_tot, M_N, C_N → 0.5*110/0.594 - 0.024*2.5*7.073/0.594^2 = 91.3898  # (rad/s)
# -pentru Ua = 0.25 * Un:
Ω_13 := 0.25*U_aN/C_N - 0 = 46.2963  # (rad/s)
0.25*U_aN/C_N explicit, U_aN, C_N → 0.25*110/0.594 = 46.2963  # (rad/s)
Ω_14 := 0.25*U_aN/C_N - R_tot*M_0/C_N^2 = 46.2564  # (rad/s)
C_N = 0.594
M_0 = 0.586  # (N*m)
0.25*U_aN/C_N - R_tot*M_0/C_N^2 explicit, U_aN, C_N, R_tot, M_0, C_N → 0.25*110/0.594 - 0.024*0.586/0.594^2 = 46.2564  # (rad/s)
Ω_15 := 0.25*U_aN/C_N - R_tot*M_N/C_N^2 = 45.8152  # (rad/s)
M_N = 7.073  # (N*m)
0.25*U_aN/C_N - R_tot*M_N/C_N^2 explicit, U_aN, C_N, R_tot, M_N, C_N → 0.25*110/0.594 - 0.024*7.073/0.594^2 = 45.8152  # (rad/s)
Ω_16 := 0.25*U_aN/C_N - R_tot*2.5*M_N/C_N^2 = 45.0935  # (rad/s)
0.25*U_aN/C_N - R_tot*2.5*M_N/C_N^2 explicit, U_aN, C_N, R_tot, M_N, C_N → 0.25*110/0.594 - 0.024*2.5*7.073/0.594^2 = 45.0935  # (rad/s)
# b. Caracteristicile artificiale obţinute prin modificarea fluxului de excitatie:
R_tot = 0.024  # (Ω)
U_a := U_aN = 110  # (V)
# ψ = ψN (adică k * ψ = k * ψN = CN) caracteristica naturală - CN
# ψ = 0.75 * ψN echivalent cu k * ψ = 0.75 * k * ΨN = 0.75 * CN
# Ψ = 0.5 * ΨN echivalent cu k * Ψ = 0.5 * k * ΨN = 0.5 * CN
# Ψ = Ψsat echivalent cu k * Ψ = k * Ψsat = Ψsat * CN, unde
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# Caracteristica
# naturală
# Caracteristica la
# Caracteristica la
# Caracteristica la
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# M
# [N m]
# Ω [rad / s]
# Ω [rad / s]
# Ω [rad / s]
# Ω [rad / s]
M = 0
148.45
197.931
296.896
133.33
M_0 = 0.586
172.622
147.733
196.659
294.036
132.75
M_N = 7.073
168.454
138.247
179.795
256.09
125.09
2.5*M_N = 17.6825
161.655
122.944
152.591
194.882
112.74
# -pentru CN = 0.75 kΨ:
Ω_17 := U_aN/(0.75*C_N) - 0 = 246.914  # (rad/s)
U_aN/(0.75*C_N) explicit, U_aN, C_N → 110/(0.75*0.594) = 246.914  # (rad/s)
Ω_18 := U_aN/(0.75*C_N) - R_tot*M_0/(0.75*C_N)^2 = 246.843  # (rad/s)
C_N = 0.594
M_0 = 0.586  # (N*m)
U_aN/(0.75*C_N) - R_tot*M_0/(0.75*C_N)^2 explicit, U_aN, C_N, R_tot, M_0, C_N → 110/(0.75*0.594) - 0.024*0.586/(0.75*0.594)^2 = 246.843  # (rad/s)
Ω_19 := U_aN/(0.75*C_N) - R_tot*M_N/(0.75*C_N)^2 = 246.058  # (rad/s)
M_N = 7.073  # (N*m)
U_aN/(0.75*C_N) - R_tot*M_N/(0.75*C_N)^2 explicit, U_aN, C_N, R_tot, M_N, C_N → 110/(0.75*0.594) - 0.024*7.073/(0.75*0.594)^2 = 246.058  # (rad/s)
Ω_20 := U_aN/(0.75*C_N) - R_tot*2.5*M_N/(0.75*C_N)^2 = 244.775  # (rad/s)
U_aN/(0.75*C_N) - R_tot*2.5*M_N/(0.75*C_N)^2 explicit, U_aN, C_N, R_tot, M_N, C_N → 110/(0.75*0.594) - 0.024*2.5*7.073/(0.75*0.594)^2 = 244.775  # (rad/s)
# -pentru CN = 0.5 kΨ:
Ω_21 := U_aN/(0.5*C_N) = 370.37  # (rad/s)
U_aN/(0.5*C_N) explicit, U_aN, C_N → 110/(0.5*0.594) = 370.37  # (rad/s)
C_N = 0.594
Ω_22 := U_aN/(0.5*C_N) - R_tot*M_0/(0.5*C_N)^2 = 370.211  # (rad/s)
M_0 = 0.586  # (N*m)
U_aN/(0.5*C_N) - R_tot*M_0/(0.5*C_N)^2 explicit, U_aN, C_N, R_tot, M_0, C_N → 110/(0.5*0.594) - 0.024*0.586/(0.5*0.594)^2 = 370.211  # (rad/s)
Ω_23 := U_aN/(0.5*C_N) - R_tot*M_N/(0.5*C_N)^2 = 368.446  # (rad/s)
M_N = 7.073  # (N*m)
U_aN/(0.5*C_N) - R_tot*M_N/(0.5*C_N)^2 explicit, U_aN, C_N, R_tot, M_N, C_N → 110/(0.5*0.594) - 0.024*7.073/(0.5*0.594)^2 = 368.446  # (rad/s)
Ω_24 := U_aN/(0.5*C_N) - R_tot*2.5*M_N/(0.5*C_N)^2 = 365.559  # (rad/s)
U_aN/(0.5*C_N) - R_tot*2.5*M_N/(0.5*C_N)^2 explicit, U_aN, C_N, R_tot, M_N, C_N → 110/(0.5*0.594) - 0.024*2.5*7.073/(0.5*0.594)^2 = 365.559  # (rad/s)
# -pentru CN = kΨsat,
# avem:
ψ_sat% = 129.7
ψ_sat' := ψ_sat%/100 = 1.297
C_Nsat := ψ_sat'*C_N = 0.770418
ψ_sat'*C_N explicit, ψ_sat', C_N → 1.297*0.594 = 0.770418
C_Nsat := 0.825
Ω_25 := U_aN/C_Nsat - 0 = 133.333  # (rad/s)
U_aN/C_Nsat explicit, U_aN, C_Nsat → 110/0.825 = 133.333  # (rad/s)
Ω_26 := U_aN/C_Nsat - R_tot*M_0/C_Nsat^2 = 133.313  # (rad/s)
C_N = 0.594
M_0 = 0.586  # (N*m)
U_aN/C_Nsat - R_tot*M_0/C_Nsat^2 explicit, U_aN, C_Nsat, R_tot, M_0, C_Nsat → 110/0.825 - 0.024*0.586/0.825^2 = 133.313  # (rad/s)
Ω_27 := U_aN/C_Nsat - R_tot*M_N/C_Nsat^2 = 133.084  # (rad/s)
M_N = 7.073  # (N*m)
U_aN/C_Nsat - R_tot*M_N/C_Nsat^2 explicit, U_aN, C_Nsat, R_tot, M_Naprox, C_Nsat → 110/0.825 - 0.024*M_N/0.825^2 = 133.084  # (rad/s)
Ω_28 := U_aN/C_Nsat - R_tot*2.5*M_N/C_Nsat^2 = 132.71  # (rad/s)
U_aN/C_Nsat - R_tot*2.5*M_N/C_Nsat^2 explicit, U_aN, C_Nsat, R_tot, M_N, C_Nsat → 110/0.825 - 0.024*2.5*7.073/0.825^2 = 132.71  # (rad/s)
# c. Caracteristicile artificiale obţinute prin modificarea
# rezistenţei în circuitul indusului: Ra = <var.>:
# Condiţii iniţiale:
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# Caracteristica naturală
# Rtot = Ra
# Caracteristica la
# Rtot = 0.2 * RN
# Caracteristica la
# Rtot = 0.4 * RN
# M
# [N m]
# Ω [rad / s]
# Ω [rad / s]
# Ω [rad / s]
M = 0
148.448
148.448
148.448
M_0 = 0.586
147.733
146.374
144.301
M_N = 7.073
138.247
118.864
89.28
74.488
0.527
2.5*M_N = 17.6825
122.944
# -pentru Rtot = 0.2 * RN:
R_N = 9.24  # (Ω)
Ω_29 := U_aN/C_N - 0 = 185.185  # (rad/s)
U_aN/C_N explicit, U_aN, C_N → 110/0.594 = 185.185  # (rad/s)
Ω_30 := U_aN/C_N - 0.2*R_N*M_0/C_N^2 = 182.116  # (rad/s)
C_N = 0.594
M_0 = 0.586  # (N*m)
U_aN/C_N - 0.2*R_N*M_0/C_N^2 explicit, U_aN, C_N, R_N, M_0, C_N → 110/0.594 - 0.2*9.24*0.586/0.594^2 = 182.116  # (rad/s)
Ω_31 := U_aN/C_N - 0.2*R_N*M_N/C_N^2 = 148.14  # (rad/s)
M_N = 7.073  # (N*m)
U_aN/C_N - 0.2*R_N*M_N/C_N^2 explicit, U_aN, C_N, R_N, M_N, C_N → 110/0.594 - 0.2*9.24*7.073/0.594^2 = 148.14  # (rad/s)
Ω_32 := U_aN/C_N - 0.2*R_N*2.5*M_N/C_N^2 = 92.572  # (rad/s)
U_aN/C_N - 0.2*R_N*2.5*M_N/C_N^2 explicit, U_aN, C_N, R_N, M_N, C_N → 110/0.594 - 0.2*9.24*2.5*7.073/0.594^2 = 92.572  # (rad/s)
# -pentru Rtot = 0.4 * RN:
Ω_33 := U_aN/C_N - 0 = 185.185  # (rad/s)
U_aN/C_N explicit, U_aN, C_N → 110/0.594 = 185.185  # (rad/s)
Ω_34 := U_aN/C_N - 0.4*R_N*M_0/C_N^2 = 179.047  # (rad/s)
C_N = 0.594
M_0 = 0.586  # (N*m)
U_aN/C_N - 0.4*R_N*M_0/C_N^2 explicit, U_aN, C_N, R_N, M_0, C_N → 110/0.594 - 0.4*9.24*0.586/0.594^2 = 179.047  # (rad/s)
Ω_35 := U_aN/C_N - 0.4*R_N*M_N/C_N^2 = 111.095  # (rad/s)
M_N = 7.073  # (N*m)
U_aN/C_N - 0.4*R_N*M_N/C_N^2 explicit, U_aN, C_N, R_N, M_N, C_N → 110/0.594 - 0.4*9.24*7.073/0.594^2 = 111.095  # (rad/s)
Ω_36 := U_aN/C_N - 0.4*R_N*2.5*M_N/C_N^2 = -0.0411523  # (rad/s)
U_aN/C_N - 0.4*R_N*2.5*M_N/C_N^2 explicit, U_aN, C_N, R_N, M_N, C_N → 110/0.594 - 0.4*9.24*2.5*7.073/0.594^2 = -0.0411523  # (rad/s)
I_5. Determinarea momentului de inerţie a motorului de curent continuu
P_N = 1.1  # (KW)
T_n1000 := 0.05
# 1.Constanta de timp nominală de pornire:
T_n := T_n1000*n_N/1000 = 0.081
(s)
M_N := 7.07
Ω_N := 169.64
2..Momentul de inerţie a motorlui de curent continuu:
J := T_n*M_N/Ω_N = 0.0033758  # (kgm^2)
3.Constanta de timp electromecanică pentru caracteristica naturală:
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.
J := 0.033
T_emN := J*R_a/C_N^2 = 0.0720165  # (s)
I_6. Ridicarea caracteristicilor de viteză unghiulară, curent şi cuplu în regim tranzitoriu
1.6.1. Ridicarea caracteristicilor mecanice statice a motorului respectiv a sarcinii mecanice
U_a := 0.2*U_aN
U_aN = 110
U_a = 22
R_tot := R_a
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M_0 = 0.586
M_N = 7.07
M(Nm)
M := 0.75*M_N = 5.3025
37.037
35.758
25.465
Ω(rad/s)
# Pentru M=0
Ω := U_a/C_N - R_a/C_N^2*0
Ω = 37.037
# Pentru M=M.0
Ω := U_a/C_N - R_a/C_N^2*M_0
Ω = 35.7582
# Pentru M=0.75M.N
Ω := U_a/C_N - R_a/C_N^2*(0.75*M_N)
Ω = 25.4653
# Viteza de merg in gol pe caracteristica
Ω_0 := U_a/C_N = 37.037
# Caderea de viteza unghiulara datorata cupului rezistent M.r
M_r := 0.75*M_N = 5.3025
Δ_Ω := R_a/C_N^2*M_r = 11.5717
# Viteza unghiulara in punctul de functionare ( viteza de regim stabilizat):
Ω_r := Ω_0 - Δ_Ω = 25.4653
.
# 1.6.2 Reprezentarea evolutiei in timp a vitezei unghiulare a motorului pe durata
# pornirii
T_em := T_emN
T_emN = 0.0720165
Ω_i := 0
Ω(t) := (Ω_0 - Ω_i - Δ_Ω)*(1 - e^(-t/T_em)) + Ω_i
t := 0, 0.001 .. 5*T_emN
Ω_st := Ω_r
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# 1.6.3 Reprezentarea evolutiei in timp a curentului indusului pe durata pornirii
# Curentul in regim stabilizat corespunzator cuplului rezistent M.r este:
I_r := M_r/C_N = 8.92677
# Curentul inital la momentul t=0
I_i := (U_a - C_N*Ω_i)/R_tot = 28.5714
# Se va ridica caracteristica de variatie a curentului la pornire ia(t) conform expresiei:
Ω_0 := 0
t := 0, 0.001 .. 5*T_emN
i_a(t) := (I_i - I_r)*e^(-t/T_em) + I_r
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# 1.6.4 Reprezentarea evolutiei in timp a cuplurilor pe durata pornirii
# a. Calculul si reprezentarea cuplului motor pe durata pornirii
# Cuplul initial la pornire:
M_i := C_N*I_i = 16.9714
# Cuplul motorului in functie de timp se reprezinta pe baza expresiei
M(t) := (M_i - M_r)*e^(-t/T_em) + M_r
M_r(t) := M_r
M_j(t) := M(t) - M_r(t)
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