# Managementul energiei
# Proiect
n := 11
λ_M1 := 0.89
M1:
P_M1 := 2500  # kV
λ_M2 := 0.87
M2:
P_M2 := 1000  # kV
λ_M3 := 0.89
M3:
P_M3 := 2500  # kV
# L1:  (2x3x120)Al
l_1 := 500*(1 + n/20)
l_1 = 775  # m
# L2:  (3x3x150)Al
l_2 := 800*(1 + n/20)
l_2 = 1240  # m
# L3:  (3x240)Al
l_3 := 600*(1 + n/20)
l_3 = 930  # m
# L4:  (2x3x240)Al
l_4 := 500*(1 + n/20)
l_4 = 775  # m
# L5:  (3x3x150)Al
l_5 := 1000*(1 + n/20)
l_5 = 1550  # m
# L6:  (3x3x120)Al
l_6 := 800*(1 + n/20)
l_6 = 1240  # m
# C1
(400 + 1j*300)*(1 + n/20)  # kVA
# C4:
(1400 + j*1000)*(1 + n/20)  # kVA
# C5:
(800 + j*500)*(1 + n/20)  # kVA
# C7:
(1000 + j*700)*(1 + n/20)  # kVA
# a) Dimensionarea si verificarea transformatoarelor
# 1)Calculam puterile active,reactive si aparente ale consumatorilor:
C1 := (400 + 1j*300)*(1 + n/20)
C1 = 620 + 465i
P_c1 := 620  # kW
C4 := (1400 + 1j*1000)*(1 + n/20)
C4 = 2170 + 1550i
P_c4 := 2170  # kW
C5 := (800 + 1j*500)*(1 + n/20)
P_c5 := 1240  # kW
C5 = 1240 + 775i
C7 := (1000 + 1j*700)*(1 + n/20)
C7 = 1550 + 1085i
P_c7 := 1550  # kW
Q_c1 := 465  # kVAr
Q_c5 := 775  # kVAr
Q_c7 := 1085  # kVAr
Q_c4 := 1550  # kVAr
S_c1 := sqrt(P_c1^2 + Q_c1^2) = 775  # kVA
λ_c1 := P_c1/S_c1 = 0.8
S_c4 := sqrt(P_c4^2 + Q_c4^2) = 2666.72  # kVA
λ_c4 := P_c4/S_c4 = 0.813733
S_c5 := sqrt(P_c5^2 + Q_c5^2) = 1462.27  # kVA
λ_c5 := P_c5/S_c5 = 0.847998
S_c7 := sqrt(P_c7^2 + Q_c7^2) = 1892.02  # kVA
S_c7 := S_c7/2 = 946.008
S_c5 := S_c5/2 = 731.134
λ_c7 := P_c7/S_c7 = 1.63846
S_T1 := 1600  # kVA
S_c1 = 775  # kVA
# Parametrii transformatorului T1:
ΔP_Fe := 3.5  # kW
U_1 := 6  # kV
U_2 := 0.4  # kV
ΔP_Cu1 := 20.2  # kW
i_01 := 1.7  # %
u_sc1 := 6  # %
# -componenta activă a tensiunii de scurtcircuit:
u_r := ΔP_Cu1/S_T1*100 = 1.2625  # %
# -componenta reactivă a tensiunii de scurtcircuit:
u_x := sqrt(u_sc1^2 - u_r^2) = 5.86567  # %
# -rezistența echivalentă a transformatorului:
R_T1 := u_r*U_1^2/S_T1*10 = 0.284062  # Ω
# -reactanța echivalentă a transformatorului:
X_T1 := u_x*U_1^2/S_T1*10 = 1.31978  # Ω
# Pierderile de putere ale transformatorului1:
# -pierderile de putere activă:
ΔP_T1 := ΔP_Fe + P_c1^2/(U_1^2*λ_c1^2)*R_T1*10^-3 = 8.23931  # kW
# -pierderile de putere reactivă în fier:
ΔQ_Fe := i_01/100*S_T1 = 27.2  # kVAr
# -pierderile de putere reactivă:
ΔQ_T1 := ΔQ_Fe + P_c1^2/(U_1^2*λ_c1^2)*X_T1*10^-3 = 49.2192  # kvar
# Parametrii liniei1:
r_01 := 0.257  # Ω/km
x_01 := 0.08  # Ω/km
Y_01 := 0.000144  # S/km
nr_cabluri1 := 2
l_1 := 500*(1 + n/20) = 775  # m
l_1 := l_1*10^-3 = 0.775  # km
s := 120  # mm^2
# -puterea activă prin linie:
P_L1 := P_c1 + ΔP_T1 = 628.239  # kW
# -puterea reactivă prin linie:
Q_L1 := Q_c1 + ΔQ_T1 = 514.219  # kvar
# -rezistența liniei:
R_linie1 := r_01*l_1/nr_cabluri1 = 0.0995875  # Ω
# -reactanța liniei:
X_linie1 := x_01*l_1/nr_cabluri1 = 0.031  # Ω
# -admitanța liniei:
Y_linie1 := nr_cabluri1*Y_01*l_1 = 0.0002232  # S/km
# Pierderile de putere pe linia1:
# -pierderile de putere activă:
ΔP_L1 := P_L1^2/(U_1^2*λ_c1^2)*R_linie1*10^-3 = 1.70597  # kW
# -pierderile de putere reactivă:
ΔQ_L1 := P_L1^2/(U_1^2*λ_c1^2)*X_linie1*10^-3 = 0.531043  # kvar
# -aportul capacititv al cablurilor:
Q_acL1 := Y_linie1*U_1^2*10^3 = 8.0352  # kvar
# Puterea în nodul 1 :
P_6kV1 := P_c1 + ΔP_T1 + ΔP_L1 = 629.945  # kW
Q_6kV1 := Q_c1 + ΔQ_T1 + ΔQ_L1 - Q_acL1 = 506.715  # kvar
λ_6kV1 := P_6kV1/sqrt(P_6kV1^2 + Q_6kV1^2) = 0.779201
S_6kV1 := sqrt(P_6kV1^2 + Q_6kV1^2) = 808.45
# Parametrii consumatorului 2:
P_M1 := 2500  # kW
λ_M1 := 0.89
S_M1 := P_M1/λ_M1 = 2808.99  # kVA
Q_M1 := sqrt(S_M1^2 - P_M1^2) = 1280.79  # kvar
# Paramterii liniei 2 :
r_02 := 0.257  # Ω/km
x_02 := 0.08  # Ω/km
Y_02 := 0.000144  # S/km
nr_cabluri2 := 3
l_2 := 800*(1 + n/20) = 1240
l_2 := l_2*10^-3 = 1.24  # km
s := 120  # mm^2
# -puterea activă prin linie:
P_L2 := P_M1 = 2500  # kW
# -puterea reactivă prin linie:
Q_L2 := Q_M1 = 1280.79  # kvar
# -rezistența liniei:
R_linie2 := r_02*l_2/nr_cabluri2 = 0.106227  # Ω
# -reactanța liniei:
X_linie2 := x_02*l_2/nr_cabluri2 = 0.0330667  # Ω
# -admitanța liniei:
Y_linie2 := nr_cabluri2*Y_02*l_2 = 0.00053568  # S/km
# Pierderile de putere pe linia2:
# -pierderile de putere activă:
ΔP_L2 := P_L2^2/(U_1^2*λ_M1^2)*R_linie2*10^-3 = 23.2826  # kW
# -pierderile de putere reactivă:
ΔQ_L2 := P_L2^2/(U_1^2*λ_M1^2)*X_linie2*10^-3 = 7.24749  # kvar
# -aportul capacititv al cablurilor:
Q_acL2 := Y_linie2*U_1^2*10^3 = 19.2845  # kvar
# Puterea în nodul 2 :
P_6kV2 := P_M1 + ΔP_L2 = 2523.28  # kW
Q_6kV2 := Q_M1 + ΔQ_L2 - Q_acL2 = 1268.75  # kvar
λ_6kV2 := P_6kV2/sqrt(P_6kV2^2 + Q_6kV2^2) = 0.893418
S_6kV2 := sqrt(P_6kV2^2 + Q_6kV2^2) = 2824.3
# Parametrii consumatorului 3:
P_M2 := 1000  # kW
λ_M2 := 0.87
S_M2 := P_M2/λ_M2 = 1149.43  # kVA
Q_M2 := sqrt(S_M2^2 - P_M2^2) = 566.726  # kvar
# Paramentrii liniei 3:
r_03 := 0.133  # Ω/km
x_03 := 0.08  # Ω/km
Y_03 := 0.00033  # S/km
nr_cabluri3 := 1
l_3 := 600*(1 + n/20) = 930  # m
l_3 := l_3*10^-3 = 0.93  # km
s := 240  # mm^2
# -puterea activă prin linie:
P_L3 := P_M2 = 1000  # kW
# -puterea reactivă prin linie:
Q_L3 := Q_M2 = 566.726  # kvar
# -rezistența liniei:
R_linie3 := r_03*l_3/nr_cabluri3 = 0.12369  # Ω
# -reactanța liniei:
X_linie3 := x_03*l_3/nr_cabluri3 = 0.0744  # Ω
# -admitanța liniei:
Y_linie3 := nr_cabluri3*Y_03*l_3 = 0.0003069  # S/km
# Pierderile de putere pe linia 3:
# -pierderile de putere activă:
ΔP_L3 := P_L3^2/(U_1^2*λ_M2^2)*R_linie3*10^-3 = 4.53935  # kW
# -pierderile de putere reactivă:
ΔQ_L3 := P_L3^2/(U_1^2*λ_M2^2)*X_linie3*10^-3 = 2.73044  # kvar
# -aportul capacititv al cablurilor:
Q_acL3 := Y_linie3*U_1^2*10^3 = 11.0484  # kvar
# Puterea în punctul 3 :
P_6kV3 := P_M2 + ΔP_L3 = 1004.54  # kW
Q_6kV3 := Q_M2 + ΔQ_L3 - Q_acL3 = 558.408  # kvar
λ_6kV3 := P_6kV3/sqrt(P_6kV3^2 + Q_6kV3^2) = 0.874035
S_6kV3 := sqrt(P_6kV3^2 + Q_6kV3^2) = 1149.31
# Paramentrii consumatorului 4:
Cons_4 := (1400 + 1000*1i)*(1 + n/20) = 2170 + 1550i  # kvar
P_cons4 := 2170  # kW
Q_cons4 := 1550  # kvar
S_cons4 := sqrt(P_cons4^2 + Q_cons4^2) = 2666.72  # kvar
λ_cons4 := P_cons4/S_cons4 = 0.813733
# Parametrii consumatorului 5:
Cons_5 := (800 + 500*1i)*(1 + n/20) = 1240 + 775i  # kvar
P_cons5 := 1240  # kW
Q_cons5 := 775  # kvar
S_cons5 := sqrt(P_cons5^2 + Q_cons5^2) = 1462.27  # kvar
λ_cons5 := P_cons5/S_cons5 = 0.847998
# Parametrii transformatorului 2
S_T2 := 1600  # kVA
U_1 := 6  # kV
U_2 := 0.4  # kV
ΔP_Fe := 3.5
ΔP_Cu := 20.2
i_02 := 1.7  # %
u_sc := 6
# -componenta activă a tensiunii de scurtcircuit:
u_r := ΔP_Cu/S_T2*100 = 1.2625  # %
# -componenta reactivă a tensiunii de scurtcircuit:
u_x := sqrt(u_sc^2 - u_r^2) = 5.86567  # %
# -rezistența echivalentă a transformatorului:
R_T2 := u_r*U_1^2/(2*S_T2)*10 = 0.142031  # Ω
R_T2ech := R_T2*R_T2/(R_T2 + R_T2) = 0.0710156
# -reactanța echivalentă a transformatorului:
X_T2 := u_x*U_1^2/(2*S_T2)*10 = 0.659888  # Ω
X_T2ech := X_T2*X_T2/(X_T2 + X_T2)
# Pierderile de putere a transformatorului 2:
# -pierderile de putere activă:
ΔP_T2 := 2*ΔP_Fe + P_cons5^2/(U_1^2*λ_cons5^2)*R_T2ech*10^-3 = 11.218  # kW
# -pierderile de putere reactivă în Fe:
ΔQ_Fe := i_02/100*S_T2 = 27.2  # kvar
# -pierderile de putere reactivă:
ΔQ_T2 := 2*ΔQ_Fe + P_cons5^2/(U_1^2*λ_cons5^2)*X_T2ech*10^-3 = 73.9971  # kvar
# Parametrii liniei4: | S/km
x_04 := 0.08  # Ω/km
Y_04 := 0.00033
r_04 := 0.133  # Ω/km
nr_cabluri4 := 2
l_4 := 500*(1 + n/20) = 775  # m
l_4 := l_4*10^-3 = 0.775  # km
s := 240  # mm^2
# -puterea activă prin linie:
P_L4 := P_cons5 + ΔP_T2 + P_cons4 = 3421.22  # kW
# -puterea reactivă prin linie:
Q_L4 := Q_cons5 + ΔQ_T2 + Q_cons4 = 2399  # kvar
# -rezistența liniei:
R_linie4 := r_04*l_4/nr_cabluri4 = 0.0515375  # Ω
# -reactanța liniei:
X_linie4 := x_04*l_4/nr_cabluri4 = 0.031  # Ω
# -admitanța liniei:
Y_linie4 := nr_cabluri4*Y_04*l_4 = 0.0005115  # S
# Pierderile de putere pe linia 4:
# -pierderile de putere activă:
ΔP_L4 := P_L4^2/(U_1^2*λ_cons4*λ_cons5)*R_linie4*10^-3 = 24.2832  # kW
# -pierderile de putere reactivă:
ΔQ_L4 := P_L4^2/(U_1^2*λ_cons4*λ_cons5)*X_linie4*10^-3 = 14.6064  # kvar
# -aportul capacititv al cablurilor:
Q_acL4 := Y_linie4*U_1^2*10^3 = 18.414  # kvar
# Puterea în nodul 4 :
P_6kV4 := P_cons5 + ΔP_T2 + P_cons4 + ΔP_L4 = 3445.5  # kW
Q_6kV4 := Q_cons5 + ΔQ_T2 + Q_cons4 + ΔQ_L4 - Q_acL4 = 2395.19  # kvar
λ_6kV4 := P_6kV4/sqrt(P_6kV4^2 + Q_6kV4^2) = 0.821093
# Parametrii consumatorului 6:
P_M3 := 2500  # kW
λ_M3 := 0.89
S_M3 := P_M3/λ_M3 = 2808.99  # kvar
Q_M3 := sqrt(S_M3^2 - P_M3^2) = 1280.79  # kvar
# Paramterii liniei 5:
r_05 := 0.204  # Ω/km
x_05 := 0.08  # Ω/km
Y_05 := 0.00017  # S/km
nr_cabluri5 := 3
l_5 := 1000*(1 + n/20) = 1550  # m
l_5 := l_5*10^-3 = 1.55  # km
s := 150  # mm^2
# -puterea activă prin linie:
P_L5 := P_M3 = 2500  # kW
# -puterea reactivă prin linie:
Q_L5 := Q_M3 = 1280.79  # kvar
# -rezistența liniei:
R_linie5 := r_05*l_5/nr_cabluri5 = 0.1054  # Ω
# -reactanța liniei:
X_linie5 := x_05*l_5/nr_cabluri5 = 0.0413333  # Ω
# -admitanța liniei:
Y_linie5 := nr_cabluri5*Y_05*l_5 = 0.0007905  # S
# Pierderile de putere pe linia 5 :
# -pierderile de putere activă:
ΔP_L5 := P_L5^2/(U_1^2*λ_M3^2)*R_linie5*10^-3 = 23.1014  # kW
# -pierderile de putere reactivă:
ΔQ_L5 := P_L5^2/(U_1^2*λ_M3^2)*X_linie5*10^-3 = 9.05937  # kvar
# -aportul capacititv al cablurilor:
Q_acL5 := Y_linie5*U_1^2*10^3 = 28.458  # kvar
# Puterea în nodul 5 :
P_6kV5 := P_M3 + ΔP_L5 = 2523.1  # kW
Q_6kV5 := Q_M3 + ΔQ_L5 - Q_acL5 = 1261.39  # kvar
λ_6kV5 := P_6kV5/sqrt(P_6kV5^2 + Q_6kV5^2) = 0.89445
# Parametrii consumatorului 7:
C_7 := (1000 + 700*1i)*(1 + n/20) = 1550 + 1085i  # kvar
P_cons7 := 1550/2 = 775  # kW
Q_cons7 := 1085/2 = 542.5  # kvar
S_cons7 := sqrt(P_cons7^2 + Q_cons7^2) = 946.008  # kvar
λ_cons7 := P_cons7/S_cons7 = 0.819232
# Parametrilor transformatorului 3 :
S_T3 := 1600  # kVA
U_1 := 6  # kV
U_2 := 0.4  # kV
ΔP_Fe := 3.5
ΔP_Cu := 20.2
i_03 := 1.7  # %
u_sc := 6  # %
# -componenta activă a tensiunii de scurtcircuit:
u_r := ΔP_Cu/S_T3*100 = 1.2625  # %
# -componenta reactivă a tensiunii de scurtcircuit:
u_x := sqrt(u_sc^2 - u_r^2) = 5.86567  # %
# -rezistența echivalentă a transformatorului:
R_T3 := u_r*U_1^2/(2*S_T3)*10 = 0.142031  # Ω
R_T3ech := R_T3*R_T3/(R_T3 + R_T3) = 0.0710156  # Ω
# -reactanța echivalentă a transformatorului:
X_T3 := u_x*U_1^2/(2*S_T3)*10 = 0.659888  # Ω
X_T3ech := X_T3*X_T3/(X_T3 + X_T3) = 0.329944  # Ω
# Pierderile de putere a transformatorului 3 :
# -pierderile de putere activă:
ΔP_T3 := 2*ΔP_Fe + P_cons7^2/(U_1^2*λ_cons7^2)*R_T3ech*10^-3 = 8.76539  # kW
# -pierderile de putere reactivă în Fe:
ΔQ_Fe := i_03/100*S_T3 = 27.2  # kvar
# -pierderile de putere reactivă:
ΔQ_T3 := 2*ΔQ_Fe + P_cons7^2/(U_1^2*λ_cons7^2)*X_T3ech*10^-3 = 62.6021  # kvar
# Paramterii liniei 6 :
r_06 := 0.257  # Ω/km
x_06 := 0.08  # Ω/km
Y_06 := 0.000144  # S/km
nr_cabluri6 := 3
l_6 := 800*(1 + n/20) = 1240  # m
l_6 := l_6*10^-3 = 1.24  # km
s := 120  # mm^2
# -puterea activă prin linie:
P_L6 := P_cons7 + ΔP_T3 = 783.765  # kW
# -puterea reactivă prin linie:
Q_L6 := Q_cons7 + ΔQ_T3 = 605.102  # kvar
# -rezistența liniei:
R_linie6 := r_06*l_6/nr_cabluri6 = 0.106227  # Ω
# -reactanța liniei:
X_linie6 := x_06*l_6/nr_cabluri6 = 0.0330667  # Ω
# -admitanța liniei:
Y_linie6 := nr_cabluri6*Y_06*l_6 = 0.00053568  # S
# Pierderile de putere pe linia 6 :
# -pierderile de putere activă:
ΔP_L6 := P_L6^2/(U_1^2*λ_cons7^2)*R_linie6*10^-3 = 2.70078  # kW
# -pierderile de putere reactivă:
ΔQ_L6 := P_L6^2/(U_1^2*λ_cons7^2)*X_linie6*10^-3 = 0.84071  # kvar
# -aportul capacititv al cablurilor:
Q_acL6 := Y_linie6*U_1^2*10^3 = 19.2845  # kvar
# Puterea în punctul 6 :
P_6kV6 := P_cons7 + ΔP_T3 + ΔP_L6 = 786.466  # kW
Q_6kV6 := Q_cons7 + ΔQ_T3 + ΔQ_L6 - Q_acL6 = 586.658  # kvar
λ_6kV6 := P_6kV6/sqrt(P_6kV6^2 + Q_6kV6^2) = 0.801558
# Puterea la nivelul barei de 6 kV
# Puterea activa la nivelul barei de 6 kV:
P_6kV := P_6kV1 + P_6kV2 + P_6kV3 + P_6kV4 + P_6kV5 + P_6kV6 = 10912.8  # kW
Q_6kV := Q_6kV1 + Q_6kV2 + Q_6kV3 + Q_6kV4 + Q_6kV5 + Q_6kV6 = 6577.11  # kvar
S_6kV := sqrt(P_6kV^2 + Q_6kV^2) = 12741.6  # kVA
λ_6kV := P_6kV/S_6kV = 0.856473
# Parametrii transformatorului 4
S_T4 := 16000  # kVA
ΔP_Fe := 24
U_1 := 110  # kV
ΔP_Cu := 97
U_2 := 6  # kv
i_04 := 1.2  # %
u_sc := 11  # %
# -componenta activă a tensiunii de scurtcircuit:
u_r := ΔP_Cu/S_T4*100 = 0.60625  # %
# -componenta reactivă a tensiunii de scurtcircuit:
u_x := sqrt(u_sc^2 - u_r^2) = 10.9833  # %
# -rezistența echivalentă a transformatorului:
R_T4 := u_r*U_1^2/S_T4*10 = 4.58477  # Ω
# -reactanța echivalentă a transformatorului:
X_T4 := u_x*U_1^2/S_T4*10 = 83.0611  # Ω
# Pierderile de putere a transformatorului 4 :
# -pierderile de putere activă:
ΔP_T4 := ΔP_Fe + P_6kV^2/(U_1^2*λ_6kV^2)*R_T4*10^-3 = 85.5148  # kW
# -pierderile de putere reactivă în Fe:
ΔQ_Fe := i_04/100*S_T4 = 192  # kvar
# -pierderile de putere reactivă:
ΔQ_T4 := ΔQ_Fe + P_6kV^2/(U_1^2*λ_6kV^2)*X_T4*10^-3 = 1306.45  # kvar
# Puterile la nivelul barei de 110 kV
P_110kV := P_6kV + ΔP_T4 = 10998.4  # kW
Q_110kV := Q_6kV + ΔQ_T4 = 7883.56  # kvar
S_110kV := sqrt(P_110kV^2 + Q_110kV^2) = 13532  # kVA
λ_110kV := P_110kV/S_110kV = 0.812768
# Puterea bateriei de condensatoare pentru ridicarea factorului de putere la valoarea neutrală pe bara de 110 kV
λ_n := 0.92
Q_bat := P_110kV*(tan(acos(λ_110kV)) - tan(acos(λ_n))) = 3198.28  # kVAr
Q_ales := 3200  # kvar
# Solutia 1
# Puterea de compensare se distribuie la fiecare consumator si la motoare
# Paramentrii consumatorului 1.
n := 11
Cons1 := (400 + 300*1i)*(1 + n/20) = 620 + 465i  # kVA
P_cons1 := 620  # kW
Q_cons1 := 465  # kvar
kVA
S_cons1 := sqrt(P_cons1^2 + Q_cons1^2) = 775
λ_cons1 := P_cons1/S_cons1 = 0.8
Q_c1 := P_cons1*(tan(acos(0.80)) - tan(acos(0.92))) = 200.881  # kVAr
Q_bat1comp1 := 210  # kvar
Q_1comp1 := Q_cons1 - Q_bat1comp1 = 255  # kvar
S_1comp1 := sqrt(P_cons1^2 + Q_1comp1^2) = 670.392  # kVA
λ_c1comp1 := P_cons1/S_1comp1 = 0.924832
# Paramentrii transformatorului 1:
ΔP_Fe := 3.5  # kW
U_p := 6  # kV
U_s := 0.4  # kV
ΔP_Cu1 = 20.2
S_T1 := 1600  # kVA
i_01 = 1.7  # %
u_sc := 6  # %
# -componenta activă a tensiunii de scurtcircuit:
u_r := ΔP_Cu1/S_T1*100 = 1.2625  # %
# -componenta reactivă a tensiunii de scurtcircuit:
u_x := sqrt(u_sc^2 - u_r^2) = 5.86567  # %
# -rezistența echivalentă a transformatorului:
R_T1 := u_r*U_p^2/S_T1*10 = 0.284062  # Ω
# -reactanța echivalentă a transformatorului:
X_T1 := u_x*U_p^2/S_T1*10 = 1.31978  # Ω
# Pierderile de putere a transformatorului 1  :
# -pierderile de putere activă:
ΔP_T1comp1 := ΔP_Fe + P_cons1^2/(U_p^2*λ_c1comp1^2)*R_T1*10^-3 = 7.04624  # kW
# -pierderile de putere reactivă în Fe:
ΔQ_Fe := i_01/100*S_T1 = 27.2  # kvar
# -pierderile de putere reactivă:
ΔQ_T1comp1 := ΔQ_Fe + P_cons1^2/(U_p^2*λ_c1comp1^2)*X_T1*10^-3 = 43.6761  # kvar
# Paramentrii liniei 1 :
r_01 := 0.257  # Ω/km
x_01 := 0.08  # Ω/km
Y_01 := 0.000144  # S/km
nr_cabluri1 := 2
l_1 := 500*(1 + n/20) = 775  # m
l_1 := l_1*10^-3 = 0.775  # km
s := 120  # mm^2
# -puterea activă prin linie:
P_L1comp1 := P_cons1 + ΔP_T1comp1 = 627.046  # kW
# -puterea reactivă prin linie:
Q_L1comp1 := Q_1comp1 + ΔQ_T1comp1 = 298.676  # kvar
# -rezistența liniei:
R_linie1 := r_01*l_1/nr_cabluri1 = 0.0995875  # Ω
# -reactanța liniei:
X_linie1 := x_01*l_1/nr_cabluri1 = 0.031  # Ω
# -admitanța liniei:
Y_linie1 := nr_cabluri1*Y_01*l_1 = 0.0002232  # S
# Pierderile de putere pe linia 1:
# -pierderile de putere activă:
ΔP_L1comp1 := P_L1^2/(U_p^2*λ_c1comp1^2)*R_linie1*10^-3 = 1.27652  # kW
# -pierderile de putere reactivă:
ΔQ_L1comp1 := P_L1^2/(U_p^2*λ_c1comp1^2)*X_linie1*10^-3 = 0.397359  # kvar
# -aportul capacititv al cablurilor:
Q_acL1 := Y_linie1*U_p^2*10^3 = 8.0352  # kvar
# Puterea în punctul 1  :
P_6kV1comp1 := P_cons1 + ΔP_T1comp1 + ΔP_L1comp1 = 628.323  # kW
Q_6kV1comp1 := Q_1comp1 + ΔQ_T1comp1 + ΔQ_L1comp1 - Q_acL1 = 291.038  # kvar
# Parametrii consumatorul 2:
P_M1 := 2500  # kW
λ_M1 := 0.89
Q_c2 := P_M1*(tan(acos(0.89)) - tan(acos(0.92))) = 215.792  # kvar
Q_bat2comp1 := 220  # kvar
S_M1 := P_M1/λ_M1 = 2808.99  # kVA
Q_M1 := sqrt(S_M1^2 - P_M1^2) = 1280.79  # kvar
Q_2comp1 := Q_M1 - Q_bat2comp1 = 1060.79  # kvar
S_2comp1 := sqrt(P_M1^2 + Q_2comp1^2) = 2715.75  # kVA
λ_m1comp1 := P_M1/S_2comp1 = 0.920558
# Parametrii liniei 2 :
r_02 := 0.257  # Ω/km
x_02 := 0.08  # Ω/km
Y_02 := 0.000144  # S/km
nr_cabluri2 := 3
s := 120  # mm^2
l_2 := 800*(1 + n/20) = 1240  # m
l_2 := l_2*10^-3 = 1.24  # km
# -puterea activă prin linie:
P_L2 := P_M1 = 2500  # kW
# -puterea reactivă prin linie:
Q_L2comp1 := Q_2comp1 = 1060.79  # kvar
# -rezistența liniei:
R_linie2 := r_02*l_2/nr_cabluri2 = 0.106227  # Ω
# -reactanța liniei:
X_linie2 := x_02*l_2/nr_cabluri2 = 0.0330667  # Ω
# -admitanța liniei:
Y_linie2 := nr_cabluri2*Y_02*l_2 = 0.00053568  # S
# Pierderile de putere pe linia 2  :
# -pierderile de putere activă:
ΔP_L2comp1 := P_L2^2/(U_p^2*λ_m1comp1^2)*R_linie2*10^-3 = 21.7625  # kW
# -pierderile de putere reactivă:
ΔQ_L2comp1 := P_L2^2/(U_p^2*λ_m1comp1^2)*X_linie2*10^-3 = 6.77432  # kvar
# -aportul capacititv al cablurilor:
Q_acL2 := Y_linie2*U_p^2*10^3 = 19.2845  # kvar
# Puterea în punctul 2  :
P_6kV2comp1 := P_M1 + ΔP_L2comp1 = 2521.76  # kW
Q_6kV2comp1 := Q_2comp1 + ΔQ_L2comp1 - Q_acL2 = 1048.28  # kvar
# Parametrii consumatorul 3:
P_M2 := 1000  # kW
λ_M2 := 0.87
Q_c3 := P_M2*(tan(acos(0.87)) - tan(acos(0.92))) = 140.728  # kvar
Q_bat3comp1 := 150  # kVAr
S_M2 := P_M2/λ_M2 = 1149.43  # kVA
Q_M2 := sqrt(S_M2^2 - P_M2^2) = 566.726  # kVAr
Q_3comp1 := Q_M2 - Q_bat3comp1 = 416.726  # kvar
S_3comp1 := sqrt(P_M2^2 + Q_3comp1^2) = 1083.36  # kVA
λ_m2comp1 := P_M2/S_3comp1 = 0.923057
# Parametrii liniei 3  :
r_03 := 0.133  # Ω/km
x_03 := 0.08  # Ω/km
Y_03 := 0.00033  # S/km
nr_cabluri3 := 1
s := 240  # mm^2
l_3 := 600*(1 + n/20) = 930  # m
l_3 := l_3*10^-3 = 0.93  # km
# -puterea activă prin linie:
P_L3 := P_M2 = 1000  # kW
# -puterea reactivă prin linie:
Q_L3comp1 := Q_3comp1 = 416.726  # kvar
# -rezistența liniei:
R_linie3 := r_03*l_3/nr_cabluri3 = 0.12369  # Ω
# -reactanța liniei:
X_linie3 := x_03*l_3/nr_cabluri3 = 0.0744  # Ω
# -admitanța liniei:
Y_linie3 := nr_cabluri3*Y_03*l_3 = 0.0003069  # S/km
# Pierderile de putere pe linia 3  :
# -pierderile de putere activă:
ΔP_L3comp1 := P_L3^2/(U_p^2*λ_m2comp1^2)*R_linie3*10^-3 = 4.0325  # kW
# -pierderile de putere reactivă:
ΔQ_L3comp1 := P_L3^2/(U_p^2*λ_m2comp1^2)*X_linie3*10^-3 = 2.42557  # kvar
# -aportul capacititv al cablurilor:
Q_acL3 := Y_linie3*U_p^2*10^3 = 11.0484  # kVAr
# Puterea în punctul 3  :
P_6kV3comp1 := P_M2 + ΔP_L3comp1 = 1004.03  # kW
Q_6kV3comp1 := Q_3comp1 + ΔQ_L3comp1 - Q_acL3 = 408.103  # kvar
# Parametrii consumatorului 4:
Cons_4 := (1400 + 1000*1i)*(1 + n/20) = 2170 + 1550i  # kVA
P_cons4 = 2170  # kW
Q_cons4 = 1550  # kVAr
S_cons4 := sqrt(P_cons4^2 + Q_cons4^2) = 2666.72  # kVA
λ_cons4 := P_cons4/S_cons4 = 0.813733
Q_c4 := P_cons4*(tan(acos(0.814)) - tan(acos(0.92))) = 624.081  # kvar
Q_bat4comp1 := 950  # kVAr
Q_4comp1 := Q_cons4 - Q_bat4comp1 = 600  # kvar
S_4comp1 := sqrt(P_cons4^2 + Q_4comp1^2) = 2251.42  # kVA
λ_c4comp1 := P_cons4/S_4comp1 = 0.963835
# Parametrii consumatorului 5:
Cons_5 := (800 + 500*1i)*(1 + n/20) = 1240 + 775i  # kVA
P_cons5 := 1240/2
Q_cons5 := 775/2  # kvar
S_cons5 := sqrt(P_cons5^2 + Q_cons5^2) = 731.134  # kVA
λ_cons5 := P_cons5/S_cons5 = 0.847998
Q_c5 := P_cons5*(tan(acos(0.848)) - tan(acos(0.92))) = 123.378  # kvar
Q_bat5comp1 := 190  # kVAr
Q_5comp1 := Q_cons5 - Q_bat5comp1 = 197.5  # kvar
S_5comp1 := sqrt(P_cons5^2 + Q_5comp1^2) = 650.697  # kVA
λ_c5comp1 := P_cons5/S_5comp1 = 0.952825
# Parametrii transformatorului 2  :
S_T2 := 1600  # kVA
U_p := 6  # kV
U_s := 0.4  # kV
ΔP_Fe := 3.5
ΔP_Cu2 := 20.2
i_02 = 1.7  # %
u_sc := 6  # %
# -componenta activă a tensiunii de scurtcircuit:
u_r := ΔP_Cu2/S_T2*100 = 1.2625  # %
# -componenta reactivă a tensiunii de scurtcircuit:
u_x := sqrt(u_sc^2 - u_r^2) = 5.86567  # %
# -rezistența echivalentă a transformatorului:
R_T2 := u_r*U_p^2/(2*S_T2)*10 = 0.142031  # Ω
R_T2ech := R_T2*R_T2/(R_T2 + R_T2) = 0.0710156  # Ω
# -reactanța echivalentă a transformatorului:
X_T2 := u_x*U_p^2/(2*S_T2)*10 = 0.659888  # Ω
X_T2ech := X_T2*X_T2/(X_T2 + X_T2) = 0.329944  # Ω
# Pierderile de putere a transformatorului 2  :
# -pierderile de putere activă:
ΔP_T2comp1 := 2*ΔP_Fe + P_cons5^2/(U_p^2*λ_c5comp1^2)*R_T2ech*10^-3 = 7.83523  # kW
# -pierderile de putere reactivă în Fe:
ΔQ_Fe := i_02/100*S_T2 = 27.2  # kVar
# -pierderile de putere reactivă:
ΔQ_T2comp1 := 2*ΔQ_Fe + P_cons5^2/(U_p^2*λ_c5comp1^2)*X_T2ech*10^-3 = 58.2806  # kvar
# Parametrii liniei 4:
r_04 := 0.133  # Ω/km
Y_04 := 0.00033  # S/km
x_04 := 0.08  # Ω/km
nr_cabluri4 := 2
s := 240  # mm^2
l_4 := 500*(1 + n/20) = 775  # m
l_4 := l_4*10^-3 = 0.775  # km
# -puterea activă prin linie:
P_L4 := P_cons5 + ΔP_T2 + P_cons4 = 2801.22  # kW
# -puterea reactivă prin linie:
Q_L4comp1 := Q_5comp1 + ΔQ_T2comp1 + Q_4comp1 = 855.781  # kvar
# -rezistența liniei:
R_linie4 := r_04*l_4/nr_cabluri4 = 0.0515375  # Ω
# -reactanța liniei:
X_linie4 := x_04*l_4/nr_cabluri4 = 0.031  # Ω
# -admitanța liniei:
Y_linie4 := nr_cabluri4*Y_04*l_4 = 0.0005115  # S/km
# Pierderile de putere pe linia 4  :
# -pierderile de putere activă:
ΔP_L4comp1 := P_L4^2/(U_p^2*λ_c4comp1*λ_c5comp1)*R_linie4*10^-3 = 12.232  # kW
# -pierderile de putere reactivă:
ΔQ_L4comp1 := P_L4^2/(U_p^2*λ_c4comp1*λ_c5comp1)*X_linie4*10^-3 = 7.35762  # kvar
# -aportul capacititv al cablurilor:
Q_acL4 := Y_linie4*U_p^2*10^3 = 18.414  # kvar
# Puterea în punctul 4  :
P_6kV4comp1 := P_cons5 + ΔP_T2comp1 + P_cons4 + ΔP_L4comp1 = 2810.07  # kW
Q_6kV4comp1 := Q_5comp1 + ΔQ_T2comp1 + Q_4comp1 + ΔQ_L4comp1 - Q_acL4 = 844.724  # kvar
# Parametrii consumatorului 6:
P_M3 := 2500  # kW
λ_M3 := 0.89
Q_c6 := P_M3*(tan(acos(0.89)) - tan(acos(0.92))) = 215.792  # kvar
Q_bat6comp1 := 220  # kvar
S_M3 := P_M3/λ_M3 = 2808.99  # kVA
Q_M3 := sqrt(S_M3^2 - P_M3^2) = 1280.79  # kvar
Q_6comp1 := Q_M3 - Q_bat6comp1 = 1060.79  # kvar
S_6comp1 := sqrt(P_M3^2 + Q_6comp1^2) = 2715.75  # kVA
λ_m3comp1 := P_M3/S_6comp1 = 0.920558
# Parametrii liniei 5  :
r_05 := 0.204  # Ω/km
x_05 := 0.08  # Ω/km
Y_05 := 0.00017  # S/km
nr_cabluri5 := 3
s := 150  # mm^2
l_5 := 1000*(1 + n/20) = 1550  # m
l_5 := l_5*10^-3 = 1.55  # km
# -puterea activă prin linie:
P_L5 := P_M3 = 2500  # kW
# -puterea reactivă prin linie:
Q_L5comp1 := Q_6comp1 = 1060.79  # kvar
# -rezistența liniei:
R_linie5 := r_05*l_5/nr_cabluri5 = 0.1054  # Ω
# -reactanța liniei:
X_linie5 := x_05*l_5/nr_cabluri5 = 0.0413333  # Ω
# -admitanța liniei:
Y_linie5 := nr_cabluri5*Y_05*l_5 = 0.0007905  # S
# Pierderile de putere pe linia 5  :
# -pierderile de putere activă:
ΔP_L5comp1 := P_L5^2/(U_p^2*λ_m3comp1^2)*R_linie5*10^-3 = 21.5932  # kW
# -pierderile de putere reactivă:
ΔQ_L5comp1 := P_L5^2/(U_p^2*λ_m3comp1^2)*X_linie5*10^-3 = 8.4679  # kvar
# -aportul capacititv al cablurilor:
Q_acL5 := Y_linie5*U_p^2*10^3 = 28.458  # kVAr
# Puterea în punctul 5  :
P_6kV5comp1 := P_M3 + ΔP_L5comp1 = 2521.59  # kW
Q_6kV5comp1 := Q_6comp1 + ΔQ_L5comp1 - Q_acL5 = 1040.8  # kvar
# Parametrii consumatorului 7:
C_7 := (1000 + 700*1i)*(1 + n/20) = 1550 + 1085i  # kVA
P_cons7 := 1550/2  # kW
Q_cons7 := 1085/2  # kVAr
S_cons7 := sqrt(P_cons7^2 + Q_cons7^2) = 946.008  # kva
λ_cons7 := P_cons7/S_cons7 = 0.819232
Q_c7 := P_cons7*(sqrt(1 - λ_cons7^2)/λ_cons7 - sqrt(1 - λ_n^2)/λ_n) = 212.351  # kvar
Q_bat7comp1 := 320  # kvar
Q_7comp1 := Q_cons7 - Q_bat7comp1 = 222.5  # kvar
S_7comp1 := sqrt(P_cons7^2 + Q_7comp1^2) = 806.307  # kVA
λ_c7comp1 := P_cons7/S_7comp1 = 0.961172
# Parametrii transformatorului 3  :
S_T3 = 1600  # kVA
ΔP_Cu3 := 20.2  # kW
U_p := 6  # kV
U_s := 0.4  # kV
ΔP_Fe := 3.5  # kW
i_01 = 1.7  # %
u_sc := 6  # %
# -componenta activă a tensiunii de scurtcircuit:
u_r := ΔP_Cu3/(2*S_T3)*100 = 0.63125  # %
# -componenta reactivă a tensiunii de scurtcircuit:
u_x := sqrt(u_sc^2 - u_r^2) = 5.9667  # %
# -rezistența echivalentă a transformatorului:
R_T3 := u_r*U_p^2/(2*S_T3)*10 = 0.0710156  # Ω
R_T3ech := R_T3*R_T3/(R_T3 + R_T3) = 0.0355078  # Ω
# -reactanța echivalentă a transformatorului:
X_T3 := u_x*U_p^2/(2*S_T3)*10 = 0.671254  # Ω
X_T3ech := X_T3*X_T3/(X_T3 + X_T3) = 0.335627  # Ω
# Pierderile de putere a transformatorului 3 :
# -pierderile de putere activă:
ΔP_T3comp1 := 2*ΔP_Fe + P_cons7^2/(U_p^2*λ_c7comp1^2)*R_T3ech*10^-3 = 7.64124  # kW
# -pierderile de putere reactivă în Fe:
ΔQ_Fe := i_03/100*S_T3 = 27.2  # kVar
# -pierderile de putere reactivă:
ΔQ_T3comp1 := 2*ΔQ_Fe + P_cons7^2/(U_p^2*λ_c7comp1^2)*X_T3ech*10^-3 = 60.4612  # kvar
# Parametrii liniei 6:
r_06 := 0.257  # Ω/km
x_06 := 0.08  # Ω/km
Y_06 := 0.000144  # S/km
nr_cabluri6 := 3
s := 120  # mm^2
l_6 := 800*(1 + n/20) = 1240  # m
l_6 := l_6*10^-3 = 1.24  # km
# -puterea activă prin linie:
P_L6 := P_cons7 + ΔP_T3 = 783.765  # kW
# -puterea reactivă prin linie:
Q_L6comp1 := Q_7comp1 + ΔQ_T3comp1 = 282.961  # kvar
# -rezistența liniei:
R_linie6 := r_06*l_6/nr_cabluri6 = 0.106227  # Ω
# -reactanța liniei:
X_linie6 := x_06*l_6/nr_cabluri6 = 0.0330667  # Ω
# -admitanța liniei:
Y_linie6 := nr_cabluri6*Y_06*l_6 = 0.00053568  # S
# Pierderile de putere pe linia 6  :
# -pierderile de putere activă:
ΔP_L6comp1 := P_L6^2/(U_p^2*λ_c7comp1^2)*R_linie6*10^-3 = 1.96201  # kW
# -pierderile de putere reactivă:
ΔQ_L6comp1 := P_L6^2/(U_p^2*λ_c7comp1^2)*X_linie6*10^-3 = 0.610742  # kvar
# -aportul capacititv al cablurilor:
Q_acL6 := Y_linie6*U_p^2*10^3 = 19.2845  # kVAr
# Puterea în punctul 6  :
P_6kV6comp1 := P_cons7 + ΔP_T3comp1 + ΔP_L6comp1 = 784.603  # kW
Q_6kV6comp1 := Q_7comp1 + ΔQ_T3comp1 + ΔQ_L6comp1 - Q_acL6 = 264.287  # kVAr
# Puterea la nivelul barei de 6 kV
# Puterea activa la nivelul barei de 6 kV:
P_6kV1comp1 := 628.32  # kW
Q_6kV1comp1 := 291.04  # kvar
P_6kV2comp1 := 2521.76  # kW
Q_6kV2comp1 := 1048.28  # kvar
P_6kV3comp1 := 1004.03  # kW
Q_6kV3comp1 := 408.1  # kvar
P_6kV4comp1 := 2810.07  # kW
Q_6kV4comp1 := 844.72  # kvar
P_6kV5comp1 := 2521.59  # kW
Q_6kV5comp1 := 1040.798  # kvar
P_6kV6comp1 := 784.6  # kW
Q_6kV6comp1 := 264.29  # kvar
P_6kVcomp1 := P_6kV1comp1 + P_6kV2comp1 + P_6kV3comp1 + P_6kV4comp1 + P_6kV5comp1 + P_6kV6comp1
P_6kVcomp1 = 10270.4  # kW
Q_6kVcomp1 := Q_6kV1comp1 + Q_6kV2comp1 + Q_6kV3comp1 + Q_6kV4comp1 + Q_6kV5comp1 + Q_6kV6comp1
Q_6kVcomp1 = 3897.23  # kvar
S_6kVcomp1 := sqrt(P_6kVcomp1^2 + Q_6kVcomp1^2) = 10984.9  # kVA
λ_6kVcomp1 := P_6kVcomp1/S_6kVcomp1 = 0.93495
# Dimesnsionarea bateriei de condesatoar la nivelul barei de 6kV
Q_bat8comp1 := Q_ales - Q_bat1comp1 - Q_bat2comp1 - Q_bat3comp1 - Q_bat4comp1 - Q_bat5comp1 - Q_bat6comp1 - Q_bat7comp1
Q_bat8comp1 = 940  # kvar
Q_6kVcomp1fin := Q_6kVcomp1 - Q_bat8comp1 = 2957.23  # kvar
S_6kVcomp1fin := sqrt(P_6kVcomp1^2 + Q_6kVcomp1fin^2) = 10687.6  # kVA
λ_6kVcomp1fin := P_6kVcomp1/S_6kVcomp1fin = 0.960957
# Parametrii transformatorului 4
S_T4 := 16000  # kVA
ΔP_Fe := 24  # kW
U_p := 110  # kV
U_s := 6  # kV
ΔP_Cu4 := 97  # kW
i_04 := 1.2  # %
u_sc := 11  # %
# -componenta activă a tensiunii de scurtcircuit:
u_r := ΔP_Cu4/S_T4*100 = 0.60625  # %
# -componenta reactivă a tensiunii de scurtcircuit:
u_x := sqrt(u_sc^2 - u_r^2) = 10.9833  # %
# -rezistența echivalentă a transformatorului:
R_T4 := u_r*U_p^2/S_T4*10 = 4.58477  # Ω
# -reactanța echivalentă a transformatorului:
X_T4 := u_x*U_p^2/S_T4*10 = 83.0611  # Ω
# Pierderile de putere a transformatorului 4 :
# -pierderile de putere activă:
ΔP_T4comp1 := ΔP_Fe + P_6kV^2/(U_p^2*λ_6kVcomp1fin^2)*R_T4*10^-3 = 72.8651  # kW
# -pierderile de putere reactivă în Fe:
ΔQ_Fe := i_04/100*S_T4 = 192  # kVar
# -pierderile de putere reactivă:
ΔQ_T4comp1 := ΔQ_Fe + P_6kV^2/(U_p^2*λ_6kVcomp1fin^2)*X_T4*10^-3 = 1077.28  # kvar
# Puterea la nivelul barei de 110 kV
P_110kVcomp1 := P_6kVcomp1 + ΔP_T4comp1 = 10343.2  # kW
Q_110kVcomp1 := Q_6kVcomp1fin + ΔQ_T4comp1 = 4034.5  # kvar
S_110kVcomp1 := sqrt(P_110kVcomp1^2 + Q_110kVcomp1^2) = 11102.2  # kVA
λ_110kVcomp1 := P_110kVcomp1/S_110kVcomp1 = 0.931635
Q_ales = 3200  # kvar
Q_bat = 3198.28
# Solutia 2
# Puterea de compensare se distribuie integral pe bara de 6kV
# Puterile active pe bara de 6 kV | Puterile reactive pe bara de 6 kV
P_6kV1 := 939.53  # kW
Q_6kV1 := 755.5  # kvar
P_6kV2 := 2534.55  # kW
Q_6kV2 := 1262.93  # kvar
P_6kV3 := 1006.74  # kW
Q_6kV3 := 554.38  # kvar
P_6kV4 := 4201.13  # kW
Q_6kV4 := 2944.91  # kvar
P_6kV5 := 2534.28  # kW
Q_6kV5 := 1252.003  # kvar
P_6kV6 := 1167.71  # kW
Q_6kV6 := 851.58  # kVAr
Q_ales := 4000  # kvar
# Puterea activa la bara de 6kV: | Puterea reactiva la bara de 6kV:
Q_6kVcomp2 := Q_6kV - Q_ales = 2577.11
P_6kVcomp2 := P_6kV = 10912.8  # kW
# Puterea aparenta la bara de 6kV:
S_6kVcomp2 := sqrt(P_6kVcomp2^2 + Q_6kVcomp2^2) = 11213  # kVA
# factorul de putere la bara de 6kV:
λ_6kVcomp2 := P_6kVcomp2/S_6kVcomp2 = 0.97323
# Determinarea pierderilor in transformatorul T4:
S_6kVcomp2 = 11213
S_T4 := 16000  # kVA
λ_T4 := λ_6kVcomp2 = 0.97323
ΔP_Fe := 24  # kW
U_p := 110  # kV
U_s := 6  # kV
i_04 := 1.2  # %
u_sc := 11  # %
ΔP_Cu4 := 97  # kW
# -pierderile de putere activă:
ΔP_T4comp2 := ΔP_Fe + P_6kVcomp2^2/(U_p^2*λ_6kVcomp2^2)*R_T4*10^-3 = 71.6404  # kW
# -pierderile de putere reactivă în Fe:
ΔQ_Fe := i_04/100*S_T4 = 192  # kVar
# -pierderile de putere reactivă:
ΔQ_T4comp2 := ΔQ_Fe + P_6kVcomp2^2/(U_p^2*λ_6kVcomp2^2)*X_T4*10^-3 = 1055.09  # kvar
# Puterea la nivelul barei de 110 kV
P_110kVcomp2 := P_6kVcomp2 + ΔP_T4comp2 = 10984.5  # kW
Q_110kVcomp2 := Q_6kVcomp2 + ΔQ_T4comp2 = 3632.2  # kVAr
S_110kVcomp2 := sqrt(P_110kVcomp2^2 + Q_110kVcomp2^2) = 11569.4  # kVA
λ_110kVcomp2 := P_110kVcomp2/S_110kVcomp2 = 0.94944
# DETERMINAREA COSTULUI ENERGIEI IN CAZUL GENERAL
# Se va alege o durata de utilizare T=7800 de ore/an
t := 7800  # ore/an
# - puterea activa totala
P_c1 = 620  # kW
P_M1 = 2500  # kW
P_c4 = 2170  # kW
P_M2 = 1000  # kW
P_c5 = 1240  # kW
P_M3 = 2500  # kW
P_c7 = 1550  # kW
P_totala := P_c1 + P_c4 + P_c5 + P_c7 + P_M1 + P_M2 + P_M3 = 11580
P_totala = 11580  # kW
# - puterea reactiva totala:
Q_c1 := 690  # kVAr
Q_M1 = 1280.79  # kVAr
Q_c4 := 2300  # kVAr
Q_M2 = 566.726  # kVAr
Q_c5 := 1150  # kVAr
Q_M3 = 1280.79  # kVAr
Q_c7 := 1600  # kVAr
Q_totala := Q_c1 + Q_c4 + Q_c5 + Q_c7 + Q_M1 + Q_M2 + Q_M3 = 8868.3
Q_totala = 8868.3  # kVAr
# - puterea activa pierduta pe linii si transformatoare:
ΔP_L1 = 1.70597  # kW
ΔP_L2 = 23.2826  # kW
ΔP_L3 = 4.53935
ΔP_L4 = 24.2832  # kW
ΔP_L5 = 23.1014  # kW
ΔP_L6 = 2.70078
ΔP_linii := ΔP_L1 + ΔP_L2 + ΔP_L3 + ΔP_L4 + ΔP_L5 + ΔP_L6 = 79.6132  # kW
ΔP_T1 = 8.23931  # kW
ΔP_T2 = 11.218  # kW
ΔP_T3 = 8.76539  # kW
ΔP_T4 = 85.5148  # kW
ΔP_T := ΔP_T1 + 2*ΔP_T2 + 2*ΔP_T3 + ΔP_T4 = 133.721  # kW
ΔP_totala := ΔP_linii + ΔP_T = 213.334  # kW
# - puterea reactiva pierduta pe linii si transformatoare:
ΔQ_L1 = 0.531043  # kVAr
ΔQ_L2 = 7.24749  # kVAr
ΔQ_L3 = 2.73044
ΔQ_L4 = 14.6064  # kVAr
ΔQ_L5 = 9.05937  # kVAr
ΔQ_L6 = 0.84071
ΔQ_linii := ΔQ_L1 + ΔQ_L2 + ΔQ_L3 + ΔQ_L4 + ΔQ_L5 + ΔQ_L6 = 35.0155  # kVAr
ΔQ_T1 = 49.2192  # kVAr
ΔQ_T2 = 73.9971  # kVAr
ΔQ_T3 = 62.6021  # kVAr
ΔQ_T4 = 1306.45  # kVAr
ΔQ_T := ΔQ_T1 + 2*ΔQ_T2 + 2*ΔQ_T3 + ΔQ_T4 = 1628.87  # kVAr
ΔQ_totala := ΔQ_linii + ΔQ_T = 1663.88  # kVAr
# - aportul capacitiv al cablurilor:
Q_acL1 = 8.0352  # kVAr
Q_acL2 = 19.2845  # kVAr
Q_acL3 = 11.0484  # kVAr
Q_acL4 = 18.414  # kVAr
Q_acL5 = 28.458  # kVAr
Q_acL6 = 19.2845  # kVAr
Q_acTotal := Q_acL1 + Q_acL2 + Q_acL3 + Q_acL4 + Q_acL5 + Q_acL6 = 104.525  # kVAr
# - puterea activa si reactiva:
P_total := P_totala + ΔP_totala = 11793.3  # kW
Q_total := Q_totala + ΔQ_totala - Q_acTotal = 10427.7  # kVAr
# Calculul energiilor:
λ_110kV = 0.812768
t = 7800
# In functie de un t dat de 7800 de ore pe an si de  λ_110kV , se alege de pe graficul din Ghidul de Instalatii electrice, valoarea lui τ
τ := 6800  # ore/an
# - energia activa consumata anual:
E_a := P_totala*t + ΔP_totala*τ = 91774672  # kW*h/an
# - energia reactiva consumata anual:
E_r := Q_totala*t + ΔQ_totala*τ - Q_acTotal*t = 79671861  # kVAr*h/an
# - costul energiilor:
cost_Ea := 0.659
cost_Er := 0.0563
# - costul anual al energiei active:
cost_Eatotal := E_a*cost_Ea = 60479509  # lei/an
# - costul anual al energiei reactive:
E_reactiv_total := E_a*tan(acos(λ_110kV)) = 65783603
E_reactiv_netaxat := E_a*tan(acos(0.92)) = 39095847
E_reactiv_taxat := E_reactiv_total - E_reactiv_netaxat
cost_Ertotal := cost_Er*E_reactiv_taxat = 1502521  # lei/an
# DETERMINAREA COSTULUI ENERGIEI IN CAZUL PRIMEI SOLUTII DE COMPENSARE
# - puterea activa totala:
P_cons1c1 := P_c1 = 620  # kW
P_M1c1 := P_M1 = 2500
P_cons4c1 := P_c4 = 2170  # kW
P_M2c1 := P_M2 = 1000
P_cons5c1 := P_c5 = 1240  # kW
P_M3c1 := P_M3 = 2500
P_cons7c1 := P_c7 = 1550  # kW
P_atotalc1 := P_cons1c1 + P_cons4c1 + P_cons5c1 + P_cons7c1 + P_M1c1 + P_M2c1 + P_M3c1
P_atotalc1 = 11580  # kW
# - puterea reactiva totala:
Q_cons1c1 := Q_1comp1 = 255  # kVAr
Q_M1c1 := Q_2comp1 = 1060.79
Q_cons4c1 := Q_4comp1 = 600  # kVAr
Q_M2c1 := Q_3comp1 = 416.726
Q_cons5c1 := Q_5comp1 = 197.5  # kVAr
Q_M3c1 := Q_6comp1 = 1060.79
Q_cons7c1 := Q_7comp1 = 222.5  # kVAr
Q_rtotalc1 := Q_cons1c1 + Q_cons4c1 + Q_cons5c1 + Q_cons7c1 + Q_M1c1 + Q_M2c1 + Q_M3c1
Q_rtotalc1 = 3813.3  # kVAr
# - pierderile de putere activa prin linii si transformatoare:
ΔP_linie1c1 := ΔP_L1comp1 = 1.27652  # kW
ΔP_linie4c1 := ΔP_L4comp1 = 12.232
ΔP_linie2c1 := ΔP_L2comp1 = 21.7625  # kW
ΔP_linie5c1 := ΔP_L5comp1 = 21.5932
ΔP_linie3c1 := ΔP_L3comp1 = 4.0325  # kW
ΔP_linie6c1 := ΔP_L6comp1 = 1.96201
calcul_1c1 := ΔP_linie1c1 + ΔP_linie2c1 + ΔP_linie3c1 + ΔP_linie4c1 + ΔP_linie5c1 + ΔP_linie6c1
calcul_1c1 = 62.8587  # kW
ΔP_T1c1 := ΔP_T1comp1 = 7.04624  # kW
ΔP_T3c1 := ΔP_T3comp1 = 7.64124
ΔP_T2c1 := ΔP_T2comp1 = 7.83523  # kW
ΔP_T4c1 := ΔP_T4comp1 = 72.8651
calcul_2c1 := ΔP_T1c1 + 2*ΔP_T2c1 + 2*ΔP_T3c1 + ΔP_T4c1 = 110.864
ΔP_atotalc1 := calcul_1c1 + calcul_2c1 = 173.723  # kW
# - pierderile de putere reactiva prin linii si transformatoare:
ΔQ_linie1c1 := ΔQ_L1comp1 = 0.397359  # kVAr
ΔQ_linie4c1 := ΔQ_L4comp1 = 7.35762
ΔQ_linie2c1 := ΔQ_L2comp1 = 6.77432  # kVAr
ΔQ_linie5c1 := ΔQ_L5comp1 = 8.4679
ΔQ_linie3c1 := ΔQ_L3comp1 = 2.42557  # kVAr
ΔQ_linie6c1 := ΔQ_L6comp1 = 0.610742
calcul_3c1 := ΔQ_linie1c1 + ΔQ_linie2c1 + ΔQ_linie3c1 + ΔQ_linie4c1 + ΔQ_linie5c1 + ΔQ_linie6c1
calcul_3c1 = 26.0335  # kVAr
ΔQ_T1c1 := ΔQ_T1comp1 = 43.6761  # kVAr
ΔQ_T3c1 := ΔQ_T3comp1 = 60.4612
ΔQ_T2c1 := ΔQ_T2comp1 = 58.2806  # kVAr
ΔQ_T4c1 := ΔQ_T4comp1 = 1077.28
calcul_4c1 := ΔQ_T1c1 + 2*ΔQ_T2c1 + 2*ΔQ_T3c1 + ΔQ_T4c1 = 1358.44
calcul_4c1 = 1358.44  # kVAr
ΔQ_rtotalc1 := calcul_3c1 + calcul_4c1 = 1384.47
# - aportul capacitiv al cablurilor:
Q_c1comp1 := Q_acL1 = 8.0352  # kVAr
Q_c4comp1 := Q_acL4 = 18.414
Q_c2comp1 := Q_acL2 = 19.2845  # kVAr
Q_c5comp1 := Q_acL5 = 28.458
Q_c3comp1 := Q_acL3 = 11.0484  # kVAr
Q_c6comp1 := Q_acL6 = 19.2845
Q_ctotalc1 := Q_c1comp1 + Q_c2comp1 + Q_c3comp1 + Q_c4comp1 + Q_c5comp1 + Q_c6comp1
Q_ctotalc1 = 104.525  # kVAr
λ_110kVcomp1 = 0.931635
# Calculul energiilor:
τ_comp1 := 6800  # h/an
t = 7800
# - energia activa consumata anual:
E_ac1 := P_atotalc1*t + ΔP_atotalc1*τ_comp1 = 91505317  # kW*h/an
# - energia reactiva consumata anual:
E_rc1 := Q_rtotalc1*t + ΔQ_rtotalc1*τ_comp1 - Q_ctotalc1*t = 38342859  # kVAr*h/an
# - costul energiei active:
cost_Eac1 := 0.64
cost_Eatotalc1 := E_ac1*cost_Eac1 = 58563403
# - costul energiei reactive:
cost_Erc1 := 0.1
E_reactiv_taxats1 := 0
cost_Ertotalc1 := E_reactiv_taxats1*cost_Erc1 = 0
# Durata de recuperare a investitiei:
cost_energietotalc1 := cost_Eatotalc1 + cost_Ertotalc1 = 58563403  # lei
Economia_c1 := cost_Ertotal + (cost_Eatotal - cost_Eatotalc1) = 3418627  # lei
cost_1kVAr := 1500
Investitia_c1 := Q_ales*cost_1kVAr = 6000000  # lei
dobanda_1 := 7 % = 0.07
n := (log(Economia_c1) - log(Economia_c1 - dobanda_1*Investitia_c1))/log(1 + dobanda_1) = 1.93744
n*365 = 707.165  # zile
# DETERMINAREA COSTULUI ENERGIEI IN CAZUL CELEI DE A DOUA SOLUTII DE COMPENSARE
# - puterea activa totala:
P_cons1c2 := P_c1 = 620  # kW
P_M1c2 := P_M1 = 2500
P_cons4c2 := P_c4 = 2170  # kW
P_M2c2 := P_M2 = 1000
P_cons5c2 := P_c5 = 1240  # kW
P_M3c2 := P_M3 = 2500
P_cons7c2 := P_c7 = 1550  # kW
P_atotalc2 := P_cons1c2 + P_cons4c2 + P_cons5c2 + P_cons7c2 + P_M1c2 + P_M2c2 + P_M3c2
P_atotalc2 = 11580  # kW
# - puterea reactiva totala:
Q_cons1c2 := Q_c1 = 690  # kVAr
Q_M1c2 := Q_M1 = 1280.79
Q_cons4c2 := Q_c4 = 2300  # kVAr
Q_M2c2 := Q_M2 = 566.726
Q_cons5c2 := Q_c5 = 1150  # kVAr
Q_M3c2 := Q_M3 = 1280.79
Q_cons7c2 := Q_c7 = 1600  # kVAr
Q_rtotalc2 := Q_cons1c2 + Q_cons4c2 + Q_cons5c2 + Q_cons7c2 + Q_M1c2 + Q_M2c2 + Q_M3c2
Q_rtotalc2 = 8868.3  # kVAr
# - pierderile de putere activa prin linii si transformatoare:
ΔP_linie1c2 := ΔP_L1 = 1.70597  # kW
ΔP_linie4c2 := ΔP_L4 = 24.2832
ΔP_linie2c2 := ΔP_L2 = 23.2826  # kW
ΔP_linie5c2 := ΔP_L5 = 23.1014
ΔP_linie3c2 := ΔP_L3 = 4.53935  # kW
ΔP_linie6c2 := ΔP_L6 = 2.70078
calcul_1c2 := ΔP_linie1c2 + ΔP_linie2c2 + ΔP_linie3c2 + ΔP_linie4c2 + ΔP_linie5c2 + ΔP_linie6c2
calcul_1c2 = 79.6132  # kW
ΔP_T1c2 := ΔP_T1 = 8.23931  # kW
ΔP_T3c2 := ΔP_T3 = 8.76539
ΔP_T2c2 := ΔP_T2 = 11.218  # kW
ΔP_T4c2 := ΔP_T4comp2 = 71.6404
calcul_2c2 := ΔP_T1c2 + 2*ΔP_T2c2 + 2*ΔP_T3c2 + ΔP_T4c2 = 119.847
ΔP_atotalc2 := calcul_1c2 + calcul_2c2 = 199.46  # kW
# - pierderile de putere reactiva prin linii si transformatoare:
ΔQ_linie1c2 := ΔQ_L1 = 0.531043  # kVAr
ΔQ_linie4c2 := ΔQ_L4 = 14.6064
ΔQ_linie2c2 := ΔQ_L2 = 7.24749  # kVAr
ΔQ_linie5c2 := ΔQ_L5 = 9.05937
ΔQ_linie3c2 := ΔQ_L3 = 2.73044  # kVAr
ΔQ_linie6c2 := ΔQ_L6 = 0.84071
calcul_3c2 := ΔQ_linie1c2 + ΔQ_linie2c2 + ΔQ_linie3c2 + ΔQ_linie4c2 + ΔQ_linie5c2 + ΔQ_linie6c2
calcul_3c2 = 35.0155  # kVAr
ΔQ_T1c2 := ΔQ_T1 = 49.2192  # kVAr
ΔQ_T3c2 := ΔQ_T3 = 62.6021
ΔQ_T2c2 := ΔQ_T2 = 73.9971  # kVAr
ΔQ_T4c2 := ΔQ_T4comp2 = 1055.09
calcul_4c2 := ΔQ_T1c2 + 2*ΔQ_T2c2 + 2*ΔQ_T3c2 + ΔQ_T4c2 = 1377.51  # kVAr
calcul_4c2 = 1377.51
ΔQ_rtotalc2 := calcul_3c2 + calcul_4c2 = 1412.52
# - aportul capacitiv al cablurilor:
Q_c1comp2 := Q_acL1 = 8.0352  # kVAr
Q_c4comp2 := Q_acL4 = 18.414
Q_c2comp2 := Q_acL2 = 19.2845  # kVAr
Q_c5comp2 := Q_acL5 = 28.458
Q_c3comp2 := Q_acL3 = 11.0484  # kVAr
Q_c6comp2 := Q_acL6 = 19.2845
Q_ctotalc2 := Q_c1comp2 + Q_c2comp2 + Q_c3comp2 + Q_c4comp2 + Q_c5comp2 + Q_c6comp2
Q_ctotalc2 = 104.525  # kVAr
λ_110kVcomp2 = 0.94944
# Calculul energiilor:
τ_comp1 := 6800  # h/an
t = 7800
# - energia activa consumata anual:
E_ac2 := P_atotalc2*t + ΔP_atotalc2*τ_comp1 = 91680326  # kW*h/an
# - energia reactiva consumata anual:
E_rc2 := Q_rtotalc2*t + ΔQ_rtotalc2*τ_comp1 - Q_ctotalc2*t = 77962623  # kVAr*h/an
# - costul energiei active:
cost_Eac2 := 0.64
cost_Eatotalc2 := E_ac2*cost_Eac2 = 58675409
# - costul energiei reactive:
cost_Erc2 := 0.1
E_reactiv_taxats2 := 0
cost_Ertotalc2 := E_reactiv_taxats2*cost_Erc2 = 0
# Durata de recuperare a investitiei:
cost_energietotalc2 := cost_Eatotalc2 + cost_Ertotalc2 = 58675409
Economia_c2 := cost_Ertotal + (cost_Eatotal - cost_Eatotalc2) = 3306621
cost_1kVAr := 1500
Investitia_c2 := Q_ales*cost_1kVAr = 6000000
dobanda_2 := 0.07
n := (log(Economia_c2) - log(Economia_c2 - dobanda_2*Investitia_c2))/log(1 + dobanda_2)
n := 7.754
n*365 = 2830.21  # zile
# Proiect Managementul Energiei
# STUDENT: Barbu Daria, Inginerie Electrica, grupa 1741
